<?xml version="1.0"?>
<!--
************************************************************************
Dassault Rafale B - JSBSim config file
Fabrice Kauffmann (fabrice.kauffmann@gmail.com)

FDM inspired from Tatsuhiro Nishioka's T-4 Blue Impulse
************************************************************************
-->
<?xml-stylesheet href="JSBSim.xsl" type="application/xml"?>
<fdm_config name="Aeromatic" version="2.0" release="BETA">

    <fileheader>
        <author> Fabrice Kauffmann </author>
        <filecreationdate>2009-10-25</filecreationdate>
        <description>Dassaut Rafale B</description>
        <version>$Revision$</version>
    </fileheader>

    <metrics>
        <wingarea unit="FT2"> 226.05 </wingarea>
        <wingspan unit="FT"> 32.61 </wingspan>
        <chord unit="FT"> 7.87 </chord>
        <wing_incidence unit=""> 2 </wing_incidence>
        <htailarea unit="FT2"> 61.4 </htailarea>
        <htailarm unit="FT"> 15.84 </htailarm>
        <vtailarea unit="FT2"> 52.5 </vtailarea>
        <vtailarm unit="FT"> 12.04 </vtailarm>
        <location name="AERORP" unit="IN">
            <x> 20.47 </x>
            <y> 0 </y>
            <z> 12.6 </z>
        </location>
        <location name="EYEPOINT" unit="IN">
            <x> -106.3 </x>
            <y> 0 </y>
            <z> 39.37 </z>
        </location>
        <location name="VRP" unit="IN">
            <x> -232.28 </x>
            <y> 0 </y>
            <z> -3.14 </z>
        </location>
    </metrics>

    <mass_balance>
        <ixx unit="SLUG*FT2">5888</ixx>
        <iyy unit="SLUG*FT2">13801</iyy>
        <izz unit="SLUG*FT2">16770</izz>
        <ixz unit="SLUG*FT2">-800</ixz>
        <iyz unit="SLUG*FT2">0</iyz>
        <ixy unit="SLUG*FT2">0</ixy>
        <emptywt unit="LBS">8536</emptywt>
        <location name="CG" unit="IN">
            <x>25.5</x>
            <y>0</y>
            <z>7.48</z>
        </location>
        <pointmass name="Pilot">
            <weight unit="LBS">180</weight>
            <location unit="IN">
                <x>-108.6</x>
                <y>0</y>
                <z>12</z>
            </location>
        </pointmass>
        <pointmass name="Trainer">
            <weight unit="LBS">180</weight>
            <location unit="IN">
                <x>-56.29</x>
                <y>0</y>
                <z>35.43</z>
            </location>
        </pointmass>
    </mass_balance>

    <ground_reactions>
        <contact type="BOGEY" name="NOSE">
            <location unit="IN">
                <x> -170.87 </x>
                <y> 0 </y>
                <z> -57.09 </z>
            </location>
            <static_friction> 0.8 </static_friction>
            <dynamic_friction> 0.5 </dynamic_friction>
            <rolling_friction> 0.02 </rolling_friction>
            <spring_coeff unit="LBS/FT"> 4960.2 </spring_coeff>
            <damping_coeff unit="LBS/FT/SEC"> 1653.4 </damping_coeff>
            <max_steer unit="DEG"> 25 </max_steer>
            <brake_group> NONE </brake_group>
            <retractable> 0 </retractable>
        </contact>
        <contact type="BOGEY" name="LEFT_MAIN">
            <location unit="IN">
                <x> 33.46 </x>
                <y> -62.59 </y>
                <z> -59.09 </z>
            </location>
            <static_friction> 0.8 </static_friction>
            <dynamic_friction> 0.5 </dynamic_friction>
            <rolling_friction> 0.02 </rolling_friction>
            <spring_coeff unit="LBS/FT"> 16534 </spring_coeff>
            <damping_coeff unit="LBS/FT/SEC"> 3306.8 </damping_coeff>
            <max_steer unit="DEG"> 0 </max_steer>
            <brake_group> LEFT </brake_group>
            <retractable> 0 </retractable>
        </contact>
        <contact type="BOGEY" name="RIGHT_MAIN">
            <location unit="IN">
                <x> 33.46 </x>
                <y> 62.59 </y>
                <z> -59.09 </z>
            </location>
            <static_friction> 0.8 </static_friction>
            <dynamic_friction> 0.5 </dynamic_friction>
            <rolling_friction> 0.02 </rolling_friction>
            <spring_coeff unit="LBS/FT"> 16534 </spring_coeff>
            <damping_coeff unit="LBS/FT/SEC"> 3306.8 </damping_coeff>
            <max_steer unit="DEG"> 0 </max_steer>
            <brake_group> RIGHT </brake_group>
            <retractable> 0 </retractable>
        </contact>
        <contact type="STRUCTURE" name="LEFT_WT">
            <location unit="IN">
                <x> 33.46 </x>
                <y> -14.56 </y>
                <z> -26.77 </z>
            </location>
            <static_friction> 0.8 </static_friction>
            <dynamic_friction> 0.5 </dynamic_friction>
            <rolling_friction> 0 </rolling_friction>
            <spring_coeff unit="LBS/FT"> 16534 </spring_coeff>
            <damping_coeff unit="LBS/FT/SEC"> 3306.8 </damping_coeff>
            <max_steer unit="DEG"> 0 </max_steer>
            <brake_group> NONE </brake_group>
            <retractable> 1 </retractable>
        </contact>
        <contact type="STRUCTURE" name="RIGHT_WT">
            <location unit="IN">
                <x> 33.46 </x>
                <y> 14.56 </y>
                <z> -26.77 </z>
            </location>
            <static_friction> 0.8 </static_friction>
            <dynamic_friction> 0.5 </dynamic_friction>
            <rolling_friction> 0 </rolling_friction>
            <spring_coeff unit="LBS/FT"> 16534 </spring_coeff>
            <damping_coeff unit="LBS/FT/SEC"> 3306.8 </damping_coeff>
            <max_steer unit="DEG"> 0 </max_steer>
            <brake_group> NONE </brake_group>
            <retractable> 1 </retractable>
        </contact>
    </ground_reactions>

    <propulsion>
        <engine file="SNECMAM88">
            <location unit="IN">
                <x> 98.42 </x>
                <y> -27.16 </y>
                <z> -9.05 </z>
            </location>
            <orient unit="DEG">
                <roll> 0 </roll>
                <pitch> 0 </pitch>
                <yaw> 0 </yaw>
            </orient>
            <feed>0</feed>
            <thruster file="direct">
                <location unit="IN">
                    <x> 153.15 </x>
                    <y> -18.11 </y>
                    <z> -9.84 </z>
                </location>
                <orient unit="DEG">
                    <roll> 0 </roll>
                    <pitch> 0 </pitch>
                    <yaw> 0 </yaw>
                </orient>
            </thruster>
        </engine>
        <engine file="SNECMAM88">
            <location unit="IN">
                <x> 98.42 </x>
                <y> 27.16 </y>
                <z> -9.05 </z>
            </location>
            <orient unit="DEG">
                <roll> 0 </roll>
                <pitch> 0 </pitch>
                <yaw> 0 </yaw>
            </orient>
            <feed>1</feed>
            <thruster file="direct">
                <location unit="IN">
                    <x> 153.15 </x>
                    <y> 18.11 </y>
                    <z> -9.84 </z>
                </location>
                <orient unit="DEG">
                    <roll> 0 </roll>
                    <pitch> 0 </pitch>
                    <yaw> 0 </yaw>
                </orient>
            </thruster>
        </engine>
        <tank type="FUEL">
            <location unit="IN">
                <x> -57.55 </x>
                <y> -10 </y>
                <z> -11.81 </z>
            </location>
            <capacity unit="LBS">2000</capacity>
            <contents unit="LBS">1820</contents>
        </tank>
        <tank type="FUEL">
            <location unit="IN">
                <x> -57.55 </x>
                <y> 10 </y>
                <z> -11.81 </z>
            </location>
            <capacity unit="LBS">2000</capacity>
            <contents unit="LBS">1820</contents>
        </tank>
    </propulsion>

    <flight_control name="FCS: RafaleB">

        <channel name="Pitch">

            <summer name="Pitch Trim Sum">
              <input>fcs/elevator-cmd-norm</input>
              <input>fcs/pitch-trim-cmd-norm</input>
              <clipto>
                <min>-1</min>
                <max>1</max>
              </clipto>
            </summer>

            <aerosurface_scale name="Elevator Control">
              <input>fcs/pitch-trim-sum</input>
              <range>
                <min>-0.2582</min>
                <max>0.2582</max>
              </range>
              <output>fcs/elevator-pos-rad</output>
            </aerosurface_scale>

            <aerosurface_scale name="Elevator position normalized">
              <input>fcs/elevator-pos-deg</input>
              <domain>
                <min>-15</min>
                <max>15</max>
              </domain>
              <range>
                <min>-1</min>
                <max>1</max>
              </range>
              <output>fcs/elevator-pos-norm</output>
            </aerosurface_scale>

        </channel>

        <channel name="Roll">

            <summer name="Roll Trim Sum">
              <input>fcs/aileron-cmd-norm</input>
              <input>fcs/roll-trim-cmd-norm</input>
              <clipto>
                <min>-1</min>
                <max>1</max>
              </clipto>
            </summer>

            <aerosurface_scale name="Left Aileron Control">
              <input>fcs/roll-trim-sum</input>
              <range>
                <min>-0.35</min>
                <max>0.35</max>
              </range>
              <output>fcs/left-aileron-pos-rad</output>
            </aerosurface_scale>

            <aerosurface_scale name="Right Aileron Control">
              <input>fcs/roll-trim-sum</input>
              <range>
                <min>-0.35</min>
                <max>0.35</max>
              </range>
              <output>fcs/right-aileron-pos-rad</output>
            </aerosurface_scale>

            <aerosurface_scale name="Left Aileron position normalized">
              <input>fcs/left-aileron-pos-deg</input>
              <domain>
                <min>-20</min>
                <max>20</max>
              </domain>
              <range>
                <min>-1</min>
                <max>1</max>
              </range>
              <output>fcs/left-aileron-pos-norm</output>
            </aerosurface_scale>

            <aerosurface_scale name="Right Aileron position normalized">
              <input>fcs/right-aileron-pos-deg</input>
              <domain>
                <min>-20</min>
                <max>20</max>
              </domain>
              <range>
                <min>-1</min>
                <max>1</max>
              </range>
              <output>fcs/right-aileron-pos-norm</output>
            </aerosurface_scale>

        </channel>

        <channel name="Yaw">

            <summer name="Rudder Command Sum">
              <input>fcs/rudder-cmd-norm</input>
              <input>fcs/yaw-trim-cmd-norm</input>
            </summer>

            <aerosurface_scale name="Rudder Control">
              <input>fcs/rudder-command-sum</input>
              <range>
                <min>-0.25</min>
                <max>0.25</max>
              </range>
              <output>fcs/rudder-pos-rad</output>
            </aerosurface_scale>

            <aerosurface_scale name="Rudder position normalized">
              <input>fcs/rudder-pos-deg</input>
              <domain>
                <min>-15</min>
                <max>15</max>
              </domain>
              <range>
                <min>-1</min>
                <max>1</max>
              </range>
              <output>fcs/rudder-pos-norm</output>
            </aerosurface_scale>

            <scheduled_gain name="Yaw Damper Rate">
              <input>velocities/r-aero-rad_sec</input>
              <table>
                <independentVar> velocities/ve-kts </independentVar>
                <tableData>
                  30		0
                  60		2
                </tableData>
              </table>
            </scheduled_gain>

            <scheduled_gain name="Yaw Damper Beta">
              <input>aero/beta-rad</input>
              <table>
                <independentVar> velocities/ve-kts </independentVar>
                <tableData>
                  30		0
                  60		0
                </tableData>
              </table>
            </scheduled_gain>

            <summer name="Yaw Damper Sum">
              <input>fcs/yaw-damper-beta</input>
              <input>fcs/yaw-damper-rate</input>
            </summer>

            <scheduled_gain name="Yaw Damper Final">
              <input>fcs/yaw-damper-sum</input>
              <table>
                <independentVar> velocities/ve-kts </independentVar>
                <tableData>
                  30		0
                  31		1
                </tableData>
              </table>
            </scheduled_gain>

            <summer name="Rudder Sum">
              <input>fcs/rudder-command-sum</input>
              <input>fcs/yaw-damper-final</input>
            </summer>

            <aerosurface_scale name="Rudder Control">
              <input>fcs/rudder-sum</input>
              <range>
                <min>-0.35</min>
                <max>0.35</max>
              </range>
              <output>fcs/rudder-pos-rad</output>
            </aerosurface_scale>

        </channel>

        <channel name="Flaps">

            <kinematic name="Flaps Control">
              <input>fcs/flap-cmd-norm</input>
              <traverse>
                <setting>
                  <position>0</position>
                  <time>0</time>
                </setting>
                <setting>
                  <position>15</position>
                  <time>4</time>
                </setting>
                <setting>
                  <position>30</position>
                  <time>3</time>
                </setting>
              </traverse>
              <output>fcs/flap-pos-deg</output>
            </kinematic>

            <aerosurface_scale name="Flap position normalized">
              <input>fcs/flap-pos-deg</input>
              <domain>
                <min>0</min>
                <max>30</max>
              </domain>
              <range>
                <min>0</min>
                <max>1</max>
              </range>
              <output>fcs/flap-pos-norm</output>
            </aerosurface_scale>

        </channel>

        <channel name="Landing Gear">

            <kinematic name="Gear Control">
              <input>gear/gear-cmd-norm</input>
              <traverse>
                <setting>
                  <position>0</position>
                  <time>0</time>
                </setting>
                <setting>
                  <position>1</position>
                  <time>5</time>
                </setting>
              </traverse>
              <output>gear/gear-pos-norm</output>
            </kinematic>

        </channel>

        <channel name="Speedbrake">

            <kinematic name="Speedbrake Control">
              <input>fcs/speedbrake-cmd-norm</input>
              <traverse>
                <setting>
                  <position>0</position>
                  <time>0</time>
                </setting>
                <setting>
                  <position>1</position>
                  <time>1</time>
                </setting>
              </traverse>
              <output>fcs/speedbrake-pos-norm</output>
            </kinematic>

        </channel>

    </flight_control>

    <aerodynamics>
        <axis name="LIFT" unit="LBS">
            <function name="aero/coefficient/CLalpha">
                <description>Lift_due_to_alpha</description>
                <product>
                    <property>aero/qbar-psf</property>
                    <property>metrics/Sw-sqft</property>
                    <table>
                        <independentVar>aero/alpha-rad</independentVar>
                        <tableData>
                          -0.2          -0.64
                          0             0.08
                          0.26          1
                          0.6           0.448
                        </tableData>
                    </table>
                </product>
            </function>
            <function name="aero/coefficient/dCLflap">
                <description>Delta_Lift_due_to_flaps</description>
                <product>
                    <property>aero/qbar-psf</property>
                    <property>metrics/Sw-sqft</property>
                    <property>fcs/flap-pos-deg</property>
                    <value>0.01167</value>
                </product>
            </function>
            <function name="aero/coefficient/dCLsb">
                <description>Delta_Lift_due_to_speedbrake</description>
                <product>
                    <property>aero/qbar-psf</property>
                    <property>metrics/Sw-sqft</property>
                    <property>fcs/speedbrake-pos-norm</property>
                    <value>0</value>
                </product>
            </function>
            <function name="aero/coefficient/CLde">
                <description>Lift_due_to_Elevator_Deflection</description>
                <product>
                    <property>aero/qbar-psf</property>
                    <property>metrics/Sw-sqft</property>
                    <property>fcs/elevator-pos-rad</property>
                    <value>0.2</value>
                </product>
            </function>
        </axis>
        <axis name="DRAG" unit="LBS">
            <function name="aero/coefficient/CD0">
                <description>Drag_at_zero_lift</description>
                <product>
                    <property>aero/qbar-psf</property>
                    <property>metrics/Sw-sqft</property>
                    <table>
                        <independentVar>aero/alpha-rad</independentVar>
                        <tableData>
                          -1.57         1.5
                          -0.26         0.031
                          0             0.024
                          0.26          0.031
                          1.57          1.5
                        </tableData>
                    </table>
                </product>
            </function>
            <function name="aero/coefficient/CDi">
                <description>Induced_drag</description>
                <product>
                    <property>aero/qbar-psf</property>
                    <property>metrics/Sw-sqft</property>
                    <property>aero/cl-squared</property>
                    <value>0.09</value>
                </product>
            </function>
            <function name="aero/coefficient/CDmach">
                <description>Drag_due_to_mach</description>
                <product>
                    <property>aero/qbar-psf</property>
                    <property>metrics/Sw-sqft</property>
                    <table>
                        <independentVar>velocities/mach</independentVar>
                        <tableData>
                          0             0
                          0.81          0
                          0.9           0.007
                          1.1           0.023
                          1.8           0.015
                        </tableData>
                    </table>
                </product>
            </function>
            <function name="aero/coefficient/CDflap">
                <description>Drag_due_to_flaps</description>
                <product>
                    <property>aero/qbar-psf</property>
                    <property>metrics/Sw-sqft</property>
                    <property>fcs/flap-pos-deg</property>
                    <value>0.0025</value>
                </product>
            </function>
            <function name="aero/coefficient/CDgear">
                <description>Drag_due_to_gear</description>
                <product>
                    <property>aero/qbar-psf</property>
                    <property>metrics/Sw-sqft</property>
                    <property>gear/gear-pos-norm</property>
                    <value>0.02</value>
                </product>
            </function>
            <function name="aero/coefficient/CDsb">
                <description>Drag_due_to_speedbrakes</description>
                <product>
                    <property>aero/qbar-psf</property>
                    <property>metrics/Sw-sqft</property>
                    <property>fcs/speedbrake-pos-norm</property>
                    <value>0.024</value>
                </product>
            </function>
            <function name="aero/coefficient/CDbeta">
                <description>Drag_due_to_sideslip</description>
                <product>
                    <property>aero/qbar-psf</property>
                    <property>metrics/Sw-sqft</property>
                    <table>
                        <independentVar>aero/beta-rad</independentVar>
                        <tableData>
                          -1.57         1.23
                          -0.26         0.05
                          0             0
                          0.26          0.05
                          1.57          1.23
                        </tableData>
                    </table>
                </product>
            </function>
            <function name="aero/coefficient/CDde">
                <description>Drag_due_to_Elevator_Deflection</description>
                <product>
                    <property>aero/qbar-psf</property>
                    <property>metrics/Sw-sqft</property>
                    <property>fcs/elevator-pos-norm</property>
                    <value>0.02</value>
                </product>
            </function>
        </axis>
        <axis name="SIDE" unit="LBS">
            <function name="aero/coefficient/CYb">
                <description>Side_force_due_to_beta</description>
                <product>
                    <property>aero/qbar-psf</property>
                    <property>metrics/Sw-sqft</property>
                    <property>aero/beta-rad</property>
                    <value>-1</value>
                </product>
            </function>
        </axis>
        <axis name="ROLL" unit="LBS*FT">
            <function name="aero/coefficient/Clb">
                <description>Roll_moment_due_to_beta</description>
                <product>
                    <property>aero/qbar-psf</property>
                    <property>metrics/Sw-sqft</property>
                    <property>metrics/bw-ft</property>
                    <property>aero/beta-rad</property>
                    <value>-0.1</value>
                </product>
            </function>
            <function name="aero/coefficient/Clp">
                <description>Roll_moment_due_to_roll_rate</description>
                <product>
                    <property>aero/qbar-psf</property>
                    <property>metrics/Sw-sqft</property>
                    <property>metrics/bw-ft</property>
                    <property>aero/bi2vel</property>
                    <property>velocities/p-aero-rad_sec</property>
                    <value>-0.4</value>
                </product>
            </function>
            <function name="aero/coefficient/Clr">
                <description>Roll_moment_due_to_yaw_rate</description>
                <product>
                    <property>aero/qbar-psf</property>
                    <property>metrics/Sw-sqft</property>
                    <property>metrics/bw-ft</property>
                    <property>aero/bi2vel</property>
                    <property>velocities/r-aero-rad_sec</property>
                    <value>0.15</value>
                </product>
            </function>
            <function name="aero/coefficient/Clda">
                <description>Roll_moment_due_to_aileron</description>
                <product>
                    <property>aero/qbar-psf</property>
                    <property>metrics/Sw-sqft</property>
                    <property>metrics/bw-ft</property>
                    <property>fcs/left-aileron-pos-rad</property>
                    <table>
                        <independentVar>velocities/mach</independentVar>
                        <tableData>
                          0             0.18
                          2             0.05
                        </tableData>
                    </table>
                </product>
            </function>
            <function name="aero/coefficient/Cldr">
                <description>Roll_moment_due_to_rudder</description>
                <product>
                    <property>aero/qbar-psf</property>
                    <property>metrics/Sw-sqft</property>
                    <property>metrics/bw-ft</property>
                    <property>fcs/rudder-pos-rad</property>
                    <value>0.1</value>
                </product>
            </function>
        </axis>
        <axis name="PITCH" unit="LBS*FT">
            <function name="aero/coefficient/Cmalpha">
                <description>Pitch_moment_due_to_alpha</description>
                <product>
                    <property>aero/qbar-psf</property>
                    <property>metrics/Sw-sqft</property>
                    <property>metrics/cbarw-ft</property>
                    <property>aero/alpha-rad</property>
                    <value>-0.3</value>
                </product>
            </function>
            <function name="aero/coefficient/Cmde">
                <description>Pitch_moment_due_to_elevator</description>
                <product>
                    <property>aero/qbar-psf</property>
                    <property>metrics/Sw-sqft</property>
                    <property>metrics/cbarw-ft</property>
                    <property>fcs/elevator-pos-rad</property>
                    <table>
                        <independentVar>velocities/mach</independentVar>
                        <tableData>
                          0             -0.9
                          2             -0.2
                        </tableData>
                    </table>
                </product>
            </function>
            <function name="aero/coefficient/Cmq">
                <description>Pitch_moment_due_to_pitch_rate</description>
                <product>
                    <property>aero/qbar-psf</property>
                    <property>metrics/Sw-sqft</property>
                    <property>metrics/cbarw-ft</property>
                    <property>aero/ci2vel</property>
                    <property>velocities/q-aero-rad_sec</property>
                    <value>-18</value>
                </product>
            </function>
            <function name="aero/coefficient/Cmadot">
                <description>Pitch_moment_due_to_alpha_rate</description>
                <product>
                    <property>aero/qbar-psf</property>
                    <property>metrics/Sw-sqft</property>
                    <property>metrics/cbarw-ft</property>
                    <property>aero/ci2vel</property>
                    <property>aero/alphadot-rad_sec</property>
                    <value>-10</value>
                </product>
            </function>
        </axis>
        <axis name="YAW" unit="LBS*FT">
            <function name="aero/coefficient/Cnb">
                <description>Yaw_moment_due_to_beta</description>
                <product>
                    <property>aero/qbar-psf</property>
                    <property>metrics/Sw-sqft</property>
                    <property>metrics/bw-ft</property>
                    <property>aero/beta-rad</property>
                    <value>0.12</value>
                </product>
            </function>
            <function name="aero/coefficient/Cnr">
                <description>Yaw_moment_due_to_yaw_rate</description>
                <product>
                    <property>aero/qbar-psf</property>
                    <property>metrics/Sw-sqft</property>
                    <property>metrics/bw-ft</property>
                    <property>aero/bi2vel</property>
                    <property>velocities/r-aero-rad_sec</property>
                    <value>-0.15</value>
                </product>
            </function>
            <function name="aero/coefficient/Cndr">
                <description>Yaw_moment_due_to_rudder</description>
                <product>
                    <property>aero/qbar-psf</property>
                    <property>metrics/Sw-sqft</property>
                    <property>metrics/bw-ft</property>
                    <property>fcs/rudder-pos-rad</property>
                    <value>-0.1</value>
                </product>
            </function>
            <function name="aero/coefficient/Cnda">
                <description>Adverse_yaw</description>
                <product>
                    <property>aero/qbar-psf</property>
                    <property>metrics/Sw-sqft</property>
                    <property>metrics/bw-ft</property>
                    <property>fcs/left-aileron-pos-rad</property>
                    <value>0</value>
                </product>
            </function>
        </axis>
    </aerodynamics>

    <output name="JSBout.csv" type="CSV" rate="100">
        <simulation> OFF </simulation>
        <atmosphere> OFF </atmosphere>
        <massprops> OFF </massprops>
        <aerosurfaces> OFF </aerosurfaces>
        <rates> OFF </rates>
        <velocities> OFF </velocities>
        <forces> OFF </forces>
        <moments> OFF </moments>
        <position> OFF </position>
        <coefficients> OFF </coefficients>
        <ground_reactions> OFF </ground_reactions>
        <fcs> OFF </fcs>
        <propulsion> OFF </propulsion>
    </output>
</fdm_config>
